<?xml version="1.0" ?>
<Node name="root" dt="0.1" gravity="0 0 -9.81 " >
    <RequiredPlugin name="SofaOpenglVisual"/>
    <RequiredPlugin pluginName='SofaHaptics'/>
	<RequiredPlugin pluginName='SofaSparseSolver'/>
	<RequiredPlugin pluginName='SofaValidation'/>
    <VisualStyle displayFlags="hideBehaviorModels hideCollisionModels hideMappings hideForceFields" />
    <RequiredPlugin name="Geomagic plugin" pluginName="Geomagic" />

    <DefaultPipeline name="pipeline" depth="6" verbose="0"/>
    <BruteForceDetection name="detection" />
    <DefaultContactManager name="response" response="FrictionContact" />
    <LocalMinDistance name="proximity" alarmDistance="0.15" contactDistance="0.05" angleCone="0.0" />

	<Node name="Hexahedra Mesh">
		<EulerImplicitSolver name="cg_odesolver" printLog="0"  rayleighStiffness="0.1" rayleighMass="0.1" />
		<CGLinearSolver template="GraphScattered" name="linear solver" iterations="40" tolerance="1e-09" threshold="1e-09" />

		<MeshGmshLoader name="loader" filename="mesh/nine_hexa.msh" />
		<MeshObjLoader name="elasticityVectorFile" filename="mesh/elasticity_vector.obj" />
		<MechanicalObject src="@loader" template="Vec3d" name="Hexa" />

		<HexahedronSetTopologyContainer src="@loader" name="Container" />
		<HexahedronSetTopologyModifier name="Modifier" />
		<HexahedronSetTopologyAlgorithms name="TopoAlgo" template="Vec3d" />
		<HexahedronSetGeometryAlgorithms />
		<DiagonalMass template="Vec3d" name="Mass" massDensity="2.0" />


		<HexahedronFEMForceField template="Vec3d" name="FEM" poissonRatio="0.45" youngModulus="2000" />


		<FixedConstraint template="Vec3d" name="Fixed Dofs" indices="0 4 20 24  70 74" drawSize="0" />
		<!--<FixedConstraint template="Vec3d" name="Fixed Dofs" indices="12 15 28 31" drawSize="0" />-->

		<Node name="Q">
			<QuadSetTopologyContainer name="Container" />
			<QuadSetTopologyModifier name="Modifier" />
			<QuadSetTopologyAlgorithms template="Vec3d" name="TopoAlgo" />
			<QuadSetGeometryAlgorithms template="Vec3d" name="GeomAlgo" />
			<Hexa2QuadTopologicalMapping name="default6" input="@../Container" output="@Container" />
			<QuadularBendingSprings template="Vec3d" name="FEM-Bend" stiffness="3000" damping="1" />
			<TriangleCollisionModel name="default7" />
			<Node name="Visu">
				<OglModel template="ExtVec3f" name="Visual" color="1 0.75 0.796" material="Default Diffuse 1 0 0 1 1 Ambient 1 0 0 0.2 1 Specular 0 0 0 1 1 Emissive 0 0 0 1 1 Shininess 0 45 " />
				<IdentityMapping template="Vec3d,ExtVec3f" name="default12" input="@.." output="@Visual" />
			</Node>
		</Node>
	</Node>

</Node>
