<?xml version="1.0" ?>
<Node name="root" dt="0.1" gravity="0 0 -9.8 " >
    <RequiredPlugin name="SofaOpenglVisual"/>
    <RequiredPlugin pluginName='SofaHaptics'/>
	<RequiredPlugin pluginName='SofaSparseSolver'/>
    <VisualStyle displayFlags="hideBehaviorModels hideCollisionModels hideMappings hideForceFields" />
    <RequiredPlugin name="Geomagic plugin" pluginName="Geomagic" />

    <DefaultPipeline name="pipeline" depth="6" verbose="0"/>
    <BruteForceDetection name="detection" />
    <DefaultContactManager name="response" response="FrictionContact" />
    <LocalMinDistance name="proximity" alarmDistance="0.15" contactDistance="0.05" angleCone="0.0" />

	<Node name="Hexahedra Mesh">
		<EulerImplicitSolver name="cg_odesolver" printLog="0"  rayleighStiffness="0.1" rayleighMass="0.1" />
		<CGLinearSolver template="GraphScattered" name="linear solver" iterations="40" tolerance="1e-09" threshold="1e-09" />

		<MeshGmshLoader name="loader" filename="mesh/porco.msh" createSubelements="true" />
		<MeshObjLoader name="elasticityVectorFile" filename="mesh/elasticity_vector.obj" />
		<MechanicalObject  name="Volume" src="@loader" scale3d="10 4 5" translation="-25 -9 0" />

		<TetrahedronSetTopologyContainer name="Container" filename="mesh/porco.msh" tetrahedra="@loader.tetrahedra" />
		<TetrahedronSetGeometryAlgorithms  name="GeomAlgo" />

		<DiagonalMass template="Vec3d" name="Mass" massDensity="2.0" />


		<TetrahedronFEMForceField youngModulus="@elasticityVectorFile.position" poissonRatio="0.45" drawHeterogeneousTetra="1"/>


		<FixedConstraint template="Vec3d" name="Fixed Dofs" indices="0 4 20 24  70 74 974" drawSize="1" />
		<!--<FixedPlaneConstraint template="Vec3d" name="Plane" direction="0 0 1" d="0"/>-->
		<PlaneForceField template="Vec3d" name="Plane" normal="0 0 1"  d="-1" />

		<Node name="Triangles Mesh">
			<TriangleSetTopologyContainer name="Container" />
			<TriangleSetTopologyModifier name="Modifier" />
			<TriangleSetTopologyAlgorithms  name="TopoAlgo" />
			<TriangleSetGeometryAlgorithms  name="GeomAlgo" />
			<Tetra2TriangleTopologicalMapping name="Mapping" input="@../Container" output="@Container" />
			<TriangularBendingSprings  name="FEM-Bend" stiffness="1" damping="1" />
			<TriangleCollisionModel name="Models" />
			<Node name="Visu">
				<OglModel template="ExtVec3f" name="Visual" color="1 0.75 0.796" material="Default Diffuse 1 0 0 1 1 Ambient 1 0 0 0.2 1 Specular 0 0 0 1 1 Emissive 0 0 0 1 1 Shininess 0 45 "/>
				<IdentityMapping template="Vec3d,ExtVec3f" name="default12" input="@.." output="@Visual" />
			</Node>
		</Node>
	</Node>

</Node>
