<?xml version="1.0" ?>
<Node name="root" dt="0.01" gravity="0 0 -9.81">
	<RequiredPlugin name="SofaOpenglVisual"/>
	<RequiredPlugin name='SofaHaptics'/>
	<RequiredPlugin name="Geomagic plugin" pluginName="Geomagic"/>
	<VisualStyle displayFlags="hideBehaviorModels hideCollisionModels hideMappings hideForceFields"/>

	<DefaultPipeline name="pipeline" verbose="0" depth="6"/>
	<BruteForceDetection name="detection"/>
	<LocalMinDistance name="proximity" alarmDistance="0.15" contactDistance="0.05"/>
	<DefaultContactManager name="response" response="FrictionContact"/>
	<FreeMotionAnimationLoop/>

	<LCPConstraintSolver tolerance="0.001" maxIt="1000"/>
	<GeomagicDriver name="GeomagicDevice" deviceName="Default Device" scale="1" drawDeviceFrame="1" positionBase="0 0 0" orientationBase="0 0.707 0 -0.707" />

	<Node name="cube">
		<MeshObjLoader name="MeshCube" filename="mesh/cube.obj" handleSeams="1"/>
		<MeshObjLoader name="CollisionCube" filename="mesh/cube.obj"/>
		<Node name="visual">
			<OglModel name="VisualCube" src="@../MeshCube" color="pink"/>
		</Node>
		<Node name="Collision">

			<MeshTopology src="@../MeshCube" name="CollisionModel"/>
			<MechanicalObject src="@../MeshCube" name="CubeState"/>
			<TriangleCollisionModel contactStiffness="1" simulated="1" moving="1"/>
			<LineCollisionModel contactStiffness="1" simulated="1" moving="1"/>
			<PointCollisionModel contactStiffness="1" simulated="1" moving="1"/>
		</Node>
	</Node>

	<Node name="Omni">
		<MechanicalObject template="Rigid3d" name="DOFs" position="@GeomagicDevice.positionDevice"/>
		<MechanicalStateController template="Rigid3d" listening="true" mainDirection="-1.0 0.0 0.0" handleEventTriggersUpdate="true"/>
		<Node name="VisuAvatar" activated="false" >
			<MeshObjLoader name="meshLoader_1" filename="mesh/sphere.obj" scale="0.1" handleSeams="1" />
			<OglModel name="Visual" src="@meshLoader_1" color="gray"/>
			<RigidMapping input="@.." output="@Visual" index="0"/>
		</Node>
		<Node name="RefModel">
			<MeshObjLoader filename="Demos/Dentistry/data/mesh/dental_instrument_centerline.obj"  name="loader"/>
			<MeshTopology src="@loader"  />
			<MechanicalObject src="@loader" name="instrumentRefState1" ry="-180" rz="-90" dz="3.5" dx="-0.3" />
			<RigidMapping />
		</Node>
		<Node name="RefModelRight" >
			<MeshObjLoader filename="Demos/Dentistry/data/mesh/dental_instrument_centerline.obj"  name="loader"/>
			<MeshTopology src="@loader"  />
			<MechanicalObject src="@loader" name="instrumentRefState2" ry="-180" rz="-90" dz="3.5" dx="-0.3" dy="0.5" />
			<RigidMapping />
		</Node>
		<Node name="RefModelLeft" >
			<MeshObjLoader filename="Demos/Dentistry/data/mesh/dental_instrument_centerline.obj"  name="loader"/>
			<MeshTopology src="@loader"  />
			<MechanicalObject src="@loader" name="instrumentRefState3" ry="-180" rz="-90" dz="3.5" dx="-0.3" dy="-0.5" />
			<RigidMapping />
		</Node>
	</Node>

	<Node name="Instrument" >
		<EulerImplicitSolver name="ODE solver" rayleighStiffness="0.05" rayleighMass="1.0" />
		<CGLinearSolver name="linear solver" iterations="25" tolerance="1e-10" threshold="10e-10" />
		<MechanicalObject name="instrumentState" template="Rigid3d" />
		<UniformMass name="mass" totalMass="0.01" />
		<LCPForceFeedback activate="true" forceCoef="1.0"/>

		<UncoupledConstraintCorrection/>
		<Node name="VisualModel" >
			<MeshObjLoader name="meshLoader_2" filename="Demos/Dentistry/data/mesh/dental_instrument.obj" handleSeams="1" />
			<OglModel name="InstrumentVisualModel" src="@meshLoader_2" color="1.0 0.2 0.2 1.0" ry="-180" rz="-90" dz="3.5" dx="-0.3"/>
			<RigidMapping input="@instrumentState" output="@InstrumentVisualModel" />
		</Node>
		<Node name="CollisionModel" >
			<MeshObjLoader filename="Demos/Dentistry/data/mesh/dental_instrument_centerline.obj"  name="loader"/>
			<MeshTopology src="@loader" />
			<MechanicalObject src="@loader" name="instrumentCollisionState1"  ry="-180" rz="-90" dz="3.5" dx="-0.3" />
			<LineCollisionModel contactStiffness="1" />
			<PointCollisionModel contactStiffness="1" />
			<RigidMapping  input="@instrumentState" output="@instrumentCollisionState1" />
		</Node>
		<Node name="RefModelRight" >
			<MeshObjLoader filename="Demos/Dentistry/data/mesh/dental_instrument_centerline.obj"  name="loader"/>
			<MeshTopology src="@loader" />
			<MechanicalObject src="@loader" name="instrumentCollisionState2"  ry="-180" rz="-90" dz="3.5" dx="-0.3" dy="0.5" />
			<RigidMapping input="@instrumentState" output="@instrumentCollisionState2" />
		</Node>
		<Node name="RefModelLeft" >
			<MeshObjLoader filename="Demos/Dentistry/data/mesh/dental_instrument_centerline.obj"  name="loader"/>
			<MeshTopology src="@loader"  />
			<MechanicalObject src="@loader" name="instrumentCollisionState3"  ry="-180" rz="-90" dz="3.5" dx="-0.3" dy="-0.5" />
			<RigidMapping input="@instrumentState" output="@instrumentCollisionState3" />
		</Node>
		<VectorSpringForceField  template="Vec3d" object1="@Omni/RefModel/instrumentRefState1" object2="@Instrument/CollisionModel/instrumentCollisionState1" stiffness="10" viscosity="0" />
		<VectorSpringForceField  template="Vec3d" object1="@Omni/RefModelRight/instrumentRefState2" object2="@Instrument/RefModelRight/instrumentCollisionState2" stiffness="10" viscosity="0" />
		<VectorSpringForceField  template="Vec3d" object1="@Omni/RefModelLeft/instrumentRefState3" object2="@Instrument/RefModelLeft/instrumentCollisionState3" stiffness="10" viscosity="0" />
	</Node>

</Node>
